*Heading
*Node
1, -10.0, -10.0
2, -9.0, -10.0
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*Element, type=CPS4R
1, 1, 2, 23, 22
2, 2, 3, 24, 23
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*Nset, nset=all_node, generate
1, 441, 1
*Nset, nset=x2, generate
21, 441, 21
*Nset, nset=x1, generate
1, 421, 21
*Nset, nset=y2, generate
421, 441, 1
*Nset, nset=y1, generate
1, 21, 1
*Elset, elset=layer1, generate
1, 220, 1
*Elset, elset=layer2, generate
181, 400, 1
*Elset, elset=all_element, generate
1, 400, 1
*Elset, elset=Sec_1_Mat_1, generate
1, 220, 1
*Elset, elset=Sec_2_Mat_2, generate
181, 400, 1
*Solid Section, elset=Sec_1_Mat_1, material=Mat_1
,
*Solid Section, elset=Sec_2_Mat_2, material=Mat_2
,
*Material, name=Mat_1
*Density
2000,
*Elastic
224000000.0,0.4
*Material, name=Mat_2
*Density
2000,
*Elastic
56000000.0,0.4
